*Heading
** Job name: B737n Model name: Model-1
** Generated by: Abaqus/CAE 2016
*Preprint, echo=NO, model=NO, history=NO, contact=NO
**
** PARTS
**
*Part, name=B737
*Node
      1,        2661.,           0.,        102.5
      2,        2591.,           0.,        102.5
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*Element, type=S4R
 1,    1,   43, 1034,   56
 2,   43,   44, 1035, 1034
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*Nset, nset=Skin
    1,    2,    3,    4,    5,    6
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*Elset, elset=Skin
    1,    2,    3,    4,    5,    6
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*Nset, nset=Spar
    3,    4,    6,    8,   10,   13
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*Elset, elset=Spar
 1732, 1733, 1734, 1735, 1736, 1737
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*Nset, nset=Rib_A
  12,  13,  15,  36,  37,  38
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*Nset, nset=Rib_B
   9,  10,  32,  33,  34,  35
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*Nset, nset=Rib_C
   5,   6,  21,  22,  25,  28
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*Nset, nset=Rib_D
   2,   3,  16,  17,  20,  23
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*Nset, nset=Point_5
   11,   14,   39,   40,   41,   42
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*Nset, nset=Point_15
   1,   4,  18,  19,  24,  26
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*Nset, nset=Point_10
   7,   8,  27,  29,  30,  31
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*Nset, nset=LE
   1,   2,   5,   7,   9,  11
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*Nset, nset=TE
  16,  19,  22,  30,  33,  37
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** Section: Skin
*Shell Section, elset=Skin, material=Aluminium
1.55, 5
** Section: Spar
*Shell Section, elset=Spar, material=Aluminium
2.8, 5
*End Part
**
**
** ASSEMBLY
**
*Assembly, name=Assembly
**
*Instance, name=B737-1, part=B737
*End Instance
**
*Node
      1,         172.,           0.,           0.
*Node
      2,        1036.,        102.5,        102.5
*Node
      3,        2591.,           0.,           0.
*Node
      4,        1386.,        102.5,        102.5
*Node
      5,           0.,           0.,       -48.75
*Node
      6,   266.100006,           0.,       -48.75
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*Nset, nset=Hinge_2, instance=B737-1
   7,   8,  27,  29,  30,  31
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*Nset, nset=Point_6, instance=B737-1
  242,  254,  784,  819,  872, 1024
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*Nset, nset=Point_7, instance=B737-1
  231,  265,  773,  808,  861, 1013
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*Nset, nset=Point_8, instance=B737-1
  221,  275,  763,  798,  851, 1003
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*Nset, nset=Point_9, instance=B737-1
  178,  184,  696,  715,  737,  942
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*Nset, nset=Point_10, instance=B737-1
  157,  171,  548,  560,  603,  747
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*Nset, nset=Point_11, instance=B737-1
   96,  116,  382,  415,  492,  633
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*Nset, nset=Point_12, instance=B737-1
   85,  127,  371,  426,  503,  644
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*Nset, nset=Point_13, instance=B737-1
   74,  138,  360,  437,  514,  655
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*Nset, nset=Point_14, instance=B737-1
   64,  148,  350,  447,  524,  665
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*Nset, nset=Point_15, instance=B737-1
   1,   4,  18,  19,  24,  26
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*Nset, nset=Set-26
 1,
*Nset, nset=Set-27
 2,
*Nset, nset=Set-28
 3,
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*Nset, nset=Set-64
 4,
*Nset, nset=Set-65
 5,
*Nset, nset=Set-66
 6,
*Nset, nset=Set-67
 2,
*Nset, nset=Set-68
 7,
*Nset, nset=Set-69
 8,
*Nset, nset=Set-70
 9,
*Nset, nset=Set-71
 10,
*Nset, nset=Set-72
 11,
*Nset, nset=Set-73
 12,
*Nset, nset=Set-74
 13,
*Nset, nset=Set-75
 14,
*Nset, nset=Set-76
 15,
*Nset, nset=Set-77
 2,
*Nset, nset=Set-78
 16,
*Nset, nset=Set-79
 2,
*Nset, nset=Set-80
 4,
*Nset, nset=Set-81
 2,
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*Nset, nset=m_Set-45
 1,
*Nset, nset=m_Set-46
 2,
*Nset, nset=m_Set-47
 4,
*Nset, nset=m_Set-48
 3,
*Nset, nset=m_Set-49
 5,
*Nset, nset=m_Set-50
 6,
*Nset, nset=m_Set-51
 7,
*Nset, nset=m_Set-52
 8,
*Nset, nset=m_Set-53
 9,
*Nset, nset=m_Set-54
 10,
*Nset, nset=m_Set-55
 11,
*Nset, nset=m_Set-56
 12,
*Nset, nset=m_Set-57
 13,
*Nset, nset=m_Set-58
 14,
*Nset, nset=m_Set-59
 15,
*Nset, nset=m_Set-63
 5,
*Nset, nset=m_Set-77
 16,
*Surface, type=NODE, name=B737-1_Rib_A_CNS_, internal
B737-1.Rib_A, 1.
*Surface, type=NODE, name=B737-1_Rib_B_CNS_, internal
B737-1.Rib_B, 1.
*Surface, type=NODE, name=B737-1_Rib_C_CNS_, internal
B737-1.Rib_C, 1.
*Surface, type=NODE, name=B737-1_Rib_D_CNS_, internal
B737-1.Rib_D, 1.
*Surface, type=NODE, name=B737-1_Point_5_CNS_, internal
B737-1.Point_5, 1.
*Surface, type=NODE, name=Point_6_CNS_, internal
Point_6, 1.
*Surface, type=NODE, name=Point_7_CNS_, internal
Point_7, 1.
*Surface, type=NODE, name=Point_8_CNS_, internal
Point_8, 1.
*Surface, type=NODE, name=Point_9_CNS_, internal
Point_9, 1.
*Surface, type=NODE, name=Point_10_CNS_, internal
Point_10, 1.
*Surface, type=NODE, name=Point_11_CNS_, internal
Point_11, 1.
*Surface, type=NODE, name=Point_12_CNS_, internal
Point_12, 1.
*Surface, type=NODE, name=Point_13_CNS_, internal
Point_13, 1.
*Surface, type=NODE, name=Point_14_CNS_, internal
Point_14, 1.
*Surface, type=NODE, name=Point_15_CNS_, internal
Point_15, 1.
*Surface, type=NODE, name=Hinge_2_CNS_, internal
Hinge_2, 1.
** Constraint: Constraint-1
*MPC
BEAM, B737-1.Rib_A, m_Set-45
** Constraint: Constraint-2
*MPC
BEAM, B737-1.Rib_B, m_Set-46
** Constraint: Constraint-3
*MPC
BEAM, B737-1.Rib_C, m_Set-47
** Constraint: Constraint-4
*MPC
BEAM, B737-1.Rib_D, m_Set-48
** Constraint: Constraint-5
*MPC
BEAM, B737-1.Point_5, m_Set-63
** Constraint: Constraint-6
*MPC
BEAM, Point_6, m_Set-50
** Constraint: Constraint-7
*MPC
BEAM, Point_7, m_Set-51
** Constraint: Constraint-8
*MPC
BEAM, Point_8, m_Set-52
** Constraint: Constraint-9
*MPC
BEAM, Point_9, m_Set-53
** Constraint: Constraint-10
*MPC
BEAM, Point_10, m_Set-54
** Constraint: Constraint-11
*MPC
BEAM, Point_11, m_Set-55
** Constraint: Constraint-12
*MPC
BEAM, Point_12, m_Set-56
** Constraint: Constraint-13
*MPC
BEAM, Point_13, m_Set-57
** Constraint: Constraint-14
*MPC
BEAM, Point_14, m_Set-58
** Constraint: Constraint-15
*MPC
BEAM, Point_15, m_Set-59
** Constraint: Constraint-16
*MPC
BEAM, Hinge_2, m_Set-77
*End Assembly
**
** MATERIALS
**
*Material, name=Aluminium
*Elastic
 73.1, 0.33
**
** BOUNDARY CONDITIONS
**
** Name: Hinge_1 Type: Displacement/Rotation
*Boundary
Set-26, 1, 1
Set-26, 2, 2
Set-26, 3, 3
** Name: Hinge_2 Type: Displacement/Rotation
*Boundary
Set-78, 1, 1
Set-78, 2, 2
Set-78, 3, 3
** Name: Hinge_3 Type: Displacement/Rotation
*Boundary
Set-28, 1, 1
Set-28, 2, 2
** ----------------------------------------------------------------
**
** STEP: Rotation
**
*Step, name=Rotation, nlgeom=NO
*Static
1., 1., 1e-05, 1.
**
** BOUNDARY CONDITIONS
**
** Name: Hinge_1 Type: Displacement/Rotation
*Boundary, op=NEW
Set-26, 1, 1
Set-26, 2, 2, 45.45
Set-26, 3, 3
** Name: Hinge_2 Type: Displacement/Rotation
*Boundary, op=NEW
Set-78, 1, 1
Set-78, 2, 2
Set-78, 3, 3
Set-78, 4, 4, 0.4887
** Name: Hinge_3 Type: Displacement/Rotation
*Boundary, op=NEW
Set-28, 1, 1
Set-28, 2, 2, 72.44
**
** OUTPUT REQUESTS
**
*Restart, write, frequency=0
**
** FIELD OUTPUT: F-Output-1
**
*Output, field
*Node Output
CF, RF, RM, RT, TF, U, UR, UT
V, VF, VR, VT
*Element Output, directions=YES
ALPHA, ALPHAN, BF, CENTMAG, CENTRIFMAG, CORIOMAG, CS11, CTSHR, E, EE, ER, ESF1, GRAV, HP, IE, LE
MISES, MISESMAX, MISESONLY, NE, NFORC, NFORCSO, P, PE, PEEQ, PEEQMAX, PEEQT, PEMAG, PEQC, PRESSONLY, PS, ROTAMAG
S, SALPHA, SE, SEE, SEP, SEPE, SF, SPE, SSAVG, THE, TRIAX, TRNOR, TRSHR, TSHR, VE, VEEQ
VS
**
** HISTORY OUTPUT: H-Output-1
**
*Output, history, variable=PRESELECT
*End Step
** ----------------------------------------------------------------
**
** STEP: Jam
**
*Step, name=Jam, nlgeom=NO
*Static
1., 1., 1e-05, 1.
**
** BOUNDARY CONDITIONS
**
** Name: Actuator_1 Type: Displacement/Rotation
*Boundary, fixed
Set-79, 3, 3
**
** LOADS
**
** Name: Actuator_2   Type: Concentrated force
*Cload
Set-64, 3, -97.4
** Name: Load-3   Type: Concentrated force
*Cload
Set-65, 2, -0.737
** Name: Load-4   Type: Concentrated force
*Cload
Set-66, 2, -1.473
** Name: Load-6   Type: Concentrated force
*Cload
Set-68, 2, -1.473
** Name: Load-7   Type: Concentrated force
*Cload
Set-69, 2, -1.473
** Name: Load-8   Type: Concentrated force
*Cload
Set-70, 2, -1.473
** Name: Load-9   Type: Concentrated force
*Cload
Set-71, 2, -1.473
** Name: Load-10   Type: Concentrated force
*Cload
Set-72, 2, -1.473
** Name: Load-11   Type: Concentrated force
*Cload
Set-73, 2, -1.473
** Name: Load-12   Type: Concentrated force
*Cload
Set-74, 2, -1.473
** Name: Load-13   Type: Concentrated force
*Cload
Set-75, 2, -1.473
** Name: Load-14   Type: Concentrated force
*Cload
Set-76, 2, -0.737
**
** OUTPUT REQUESTS
**
*Restart, write, frequency=0
**
** FIELD OUTPUT: F-Output-1
**
*Output, field
*Node Output
CF, RF, RM, RT, TF, U, UR, UT
V, VF, VR, VT
*Element Output, directions=YES
ALPHA, ALPHAN, BF, CENTMAG, CENTRIFMAG, CORIOMAG, CS11, CTSHR, E, EE, ER, ESF1, GRAV, HP, IE, LE
MISES, MISESMAX, MISESONLY, NE, NFORC, NFORCSO, P, PE, PEEQ, PEEQMAX, PEEQT, PEMAG, PEQC, PRESSONLY, PS, ROTAMAG
S, SALPHA, SE, SEE, SEP, SEPE, SF, SPE, SSAVG, THE, TRIAX, TRNOR, TRSHR, TSHR, VE, VEEQ
VS
**
** HISTORY OUTPUT: H-Output-1
**
*Output, history, variable=PRESELECT
*End Step
** ----------------------------------------------------------------
**
** STEP: RotateDown
**
*Step, name=RotateDown, nlgeom=NO
*Static
1., 1., 1e-05, 1.
**
** BOUNDARY CONDITIONS
**
** Name: Actuator_1 Type: Displacement/Rotation
*Boundary, op=NEW
** Name: Hinge_1 Type: Displacement/Rotation
*Boundary, op=NEW
Set-26, 1, 1
Set-26, 2, 2, 45.45
Set-26, 3, 3
** Name: Hinge_2 Type: Displacement/Rotation
*Boundary, op=NEW
Set-78, 1, 1
Set-78, 2, 2
Set-78, 3, 3
Set-78, 4, 4, -0.2618
** Name: Hinge_3 Type: Displacement/Rotation
*Boundary, op=NEW
Set-28, 1, 1
Set-28, 2, 2, 72.44
**
** LOADS
**
** Name: Actuator_2   Type: Concentrated force
*Cload, op=NEW
** Name: Load-3   Type: Concentrated force
*Cload, op=NEW
Set-65, 2, -0.737
** Name: Load-4   Type: Concentrated force
*Cload, op=NEW
Set-66, 2, -1.473
** Name: Load-6   Type: Concentrated force
*Cload, op=NEW
Set-68, 2, -1.473
** Name: Load-7   Type: Concentrated force
*Cload, op=NEW
Set-69, 2, -1.473
** Name: Load-8   Type: Concentrated force
*Cload, op=NEW
Set-70, 2, -1.473
** Name: Load-9   Type: Concentrated force
*Cload, op=NEW
Set-71, 2, -1.473
** Name: Load-10   Type: Concentrated force
*Cload, op=NEW
Set-72, 2, -1.473
** Name: Load-11   Type: Concentrated force
*Cload, op=NEW
Set-73, 2, -1.473
** Name: Load-12   Type: Concentrated force
*Cload, op=NEW
Set-74, 2, -1.473
** Name: Load-13   Type: Concentrated force
*Cload, op=NEW
Set-75, 2, -1.473
** Name: Load-14   Type: Concentrated force
*Cload, op=NEW
Set-76, 2, -0.737
**
** OUTPUT REQUESTS
**
*Restart, write, frequency=0
**
** FIELD OUTPUT: F-Output-1
**
*Output, field
*Node Output
RF, U
*Element Output, directions=YES
MISES,
**
** HISTORY OUTPUT: H-Output-1
**
*Output, history, variable=PRESELECT
*End Step
** ----------------------------------------------------------------
**
** STEP: Jam_2
**
*Step, name=Jam_2, nlgeom=NO
*Static
1., 1., 1e-05, 1.
**
** BOUNDARY CONDITIONS
**
** Name: BC-5 Type: Displacement/Rotation
*Boundary, fixed
Set-81, 3, 3
**
** LOADS
**
** Name: Load-3   Type: Concentrated force
*Cload
Set-65, 2, 0.491
** Name: Load-4   Type: Concentrated force
*Cload
Set-66, 2, 0.982
** Name: Load-6   Type: Concentrated force
*Cload
Set-68, 2, 0.982
** Name: Load-7   Type: Concentrated force
*Cload
Set-69, 2, 0.982
** Name: Load-8   Type: Concentrated force
*Cload
Set-70, 2, 0.982
** Name: Load-9   Type: Concentrated force
*Cload
Set-71, 2, 0.982
** Name: Load-10   Type: Concentrated force
*Cload
Set-72, 2, 0.982
** Name: Load-11   Type: Concentrated force
*Cload
Set-73, 2, 0.982
** Name: Load-12   Type: Concentrated force
*Cload
Set-74, 2, 0.982
** Name: Load-13   Type: Concentrated force
*Cload
Set-75, 2, 0.982
** Name: Load-14   Type: Concentrated force
*Cload
Set-76, 2, 0.491
** Name: Load-15   Type: Concentrated force
*Cload
Set-80, 3, 97.4
**
** OUTPUT REQUESTS
**
*Restart, write, frequency=0
**
** FIELD OUTPUT: F-Output-1
**
*Output, field
*Node Output
RF, U
*Element Output, directions=YES
MISES,
**
** HISTORY OUTPUT: H-Output-1
**
*Output, history, variable=PRESELECT
*End Step
